#shell              mkdir -p ${dname}
log                ${dname}/log.lammps
units              si
atom_style         meso
echo               both


#variable          ndim equal 3
dimension         ${ndim}
if ${ndim}==3 then &
"boundary          p f p" &
else &
"boundary          p f p"

include           vars.lmp

# create simulation box
variable           xcenter equal 0.5*${Lx}
variable           ycenter equal 0.5*${Ly}
if ${ndim}==3 then &
"variable           zcenter equal 0.5*${Lz}" &
else &
"variable           zcenter equal 0.0" &

if ${ndim}==2 then &
"variable           pLz    equal  1.0e-3" &
"variable           nLz    equal  -1.0e-3" &
"region             box block 0.0 ${Lx}  0.0 ${Ly} ${nLz} ${pLz} units box" &
else &
"region             box block 0.0 ${Lx}  0.0 ${Ly} 0.0 ${Lz} units box"

# create box with two types of particles (water, gas)
create_box         3 box

# create gas particles
variable lshift    equal 0.5
if ${ndim}==2 then &
"lattice            sq ${dx} origin ${lshift} ${lshift} 0" &
else &
"lattice            sc ${dx} origin ${lshift} ${lshift} ${lshift}"

create_atoms       ${g_type} region box

# create walls on the top and on the bottom
variable     y1 equal 3*${dx}
variable     y2  equal ${Ly}-3.0*${dx}
if ${ndim}==3 then &
"variable    z1 equal 3*${dx}" &
"variable    z2 equal ${Lz}-3.0*${dx}" &
"region	     rflow block EDGE EDGE ${y1} ${y2} ${z1} ${z2} units box" &
else &
"region	     rflow block EDGE EDGE ${y1} ${y2} EDGE EDGE units box"

group	     flow region rflow
group	     boundary subtract all flow
fix          wallim boundary setforce 0 0 0

region       rbottom block EDGE EDGE 0 ${y1} EDGE EDGE units box
group        gbottom region rbottom

region       rupper block EDGE EDGE ${y2} EDGE EDGE EDGE units box
group        gupper region rupper

if "${ndim}==3" then &
"region       z1region block EDGE EDGE EDGE EDGE 0 ${z1} units box" &
"region       z2region block EDGE EDGE EDGE EDGE ${z2} EDGE units box" &
"group        gz1 region z1region" &
"group        gz2 region z1region" &
"fix          fz1 gz1 setmeso meso_t ${Tm}" &
"fix          fz2 gz2 setmeso meso_t ${Tm}"

group        gbottom region rbottom
# keep constant temperature on the top
fix fup      gupper  setmeso meso_t ${Tm}
fix bm       boundary setmeso meso_rho ${sph_rho_g}

# do full time integration for all particles
fix                integrate_fix_full all meso
include            settimestep.lmp

neighbor           0 bin
neigh_modify       delay 0 every 1
communicate        single vel yes

pair_style         hybrid/overlay sph/rhosum_multiphase 1 sph/colorgradient 1 &
                   sph/taitwater/morris sph/surfacetension sph/heatconduction/phasechange
pair_coeff         * * sph/rhosum_multiphase   ${h}
pair_coeff         ${d_type} ${d_type} sph/colorgradient ${h} 0
pair_coeff         ${g_type} ${d_type} sph/colorgradient ${h} ${alpha_gd}
pair_coeff         ${g_type} ${g_type} sph/colorgradient ${h} 0
pair_coeff         ${d_type} ${w_type} sph/colorgradient ${h} ${alpha_dw}
pair_coeff         ${g_type} ${w_type} sph/colorgradient ${h} ${alpha_gw}
pair_coeff         ${w_type} ${w_type} sph/colorgradient ${h} 0

variable           sph_eta_gd equal 2*${sph_eta_g}*${sph_eta_d}/(${sph_eta_d}+${sph_eta_g})
variable           sph_eta_gw equal 2*${sph_eta_g}*${sph_eta_w}/(${sph_eta_g}+${sph_eta_w})
variable           sph_eta_dw equal 2*${sph_eta_d}*${sph_eta_w}/(${sph_eta_d}+${sph_eta_w})
pair_coeff         ${g_type} ${d_type} sph/taitwater/morris ${sph_rho_g} ${sph_c_g} ${sph_eta_gd} ${gamma_g} ${h} ${rbackground}
pair_coeff         ${g_type} ${g_type} sph/taitwater/morris ${sph_rho_g} ${sph_c_g} ${sph_eta_g} ${gamma_g} ${h} ${rbackground}
pair_coeff         ${d_type} ${d_type} sph/taitwater/morris ${sph_rho_d} ${sph_c_d} ${sph_eta_d} ${gamma_d} ${h} ${rbackground}
pair_coeff         ${g_type} ${w_type} sph/taitwater/morris ${sph_rho_g} ${sph_c_g} ${sph_eta_gw} ${gamma_g} ${h} ${rbackground}
pair_coeff         ${d_type} ${w_type} sph/taitwater/morris ${sph_rho_d} ${sph_c_d} ${sph_eta_dw} ${gamma_d} ${h} ${rbackground}
pair_coeff         ${w_type} ${w_type} sph/taitwater/morris ${sph_rho_w} ${sph_c_w} ${sph_eta_w} ${gamma_w} ${h} ${rbackground}


pair_coeff         * * sph/surfacetension ${h}
pair_coeff         ${g_type} ${g_type} sph/heatconduction/phasechange  ${D_heat_g} ${h}
variable           D_heat_gd equal 2*${D_heat_g}*${D_heat_d}/(${D_heat_d}+${D_heat_g})
variable           D_heat_gd equal 2*${D_heat_g}*${D_heat_d}/(${D_heat_d}+${D_heat_g})
variable           D_heat_gw equal 2*${D_heat_g}*${D_heat_w}/(${D_heat_w}+${D_heat_g})
variable           D_heat_dw equal 2*${D_heat_d}*${D_heat_w}/(${D_heat_d}+${D_heat_w})
pair_coeff         ${g_type} ${d_type} sph/heatconduction/phasechange  ${D_heat_gd} ${h} NULL ${Tc}
pair_coeff         ${d_type} ${d_type} sph/heatconduction/phasechange  ${D_heat_d} ${h}
pair_coeff         ${g_type} ${w_type} sph/heatconduction/phasechange  ${D_heat_gw} ${h}
pair_coeff         ${d_type} ${w_type} sph/heatconduction/phasechange  ${D_heat_dw} ${h} ${Tc} NULL
pair_coeff         ${w_type} ${w_type} sph/heatconduction/phasechange  ${D_heat_w} ${h}


dump               dump_xyz all xyz ${Nfreq} ${dname}/data.xyz
dump_modify        dump_xyz element A B C

timestep           ${dt}
variable           insert_every equal 1
#variable          Hwv equal 0.00
variable           dr equal 0.5*${dx}
#variable           prob equal ${dt}/${dprob}
variable           prob equal ${dprob}

variable            time equal step*${dt}
variable            natoms equal count(all)

# create vapor atom in the center of the domain
#variable          xcenter_per equal ${xcenter}+0.5*${dx}
#variable          ycenter_per equal ${y1}-0.5*${dx}
#create_atoms      ${d_type} single  ${xcenter_per} ${ycenter_per} ${zcenter} units box

variable          seed_x equal 2.0
region            rsq sphere ${seed_x} ${y1} ${zcenter} 0.1 units box
set               region rsq type ${d_type}
set               group boundary type ${w_type}

# crate a heating spot
variable           spot_xmin equal ${seed_x}-0.2
variable           spot_xmax equal ${seed_x}+0.2
variable           spot_ymax equal ${y1}
variable           spot_zmin equal ${zcenter}-0.2
variable           spot_zmax equal ${zcenter}+0.2
region             rspot block ${spot_xmin} ${spot_xmax} EDGE ${spot_ymax} ${spot_zmin} ${spot_zmax} units box
group              gspot region rspot
group              gnotspot  subtract gbottom gspot

fix nsp            gnotspot setmeso meso_t ${Tm}
variable           e_spot equal 10.0*${cv_g}
fix spt            gspot setmeso meso_t 1.0

# variable          a_sq   equal 0.2
# include           square.lmp
# set               region rsq type ${d_type}

set               type ${d_type} meso_cv ${cv_d}
set               type ${g_type} meso_cv ${cv_g}
set               type ${d_type} meso_e ${e_d}
set               type ${g_type} meso_e ${e_g}


set               type ${d_type} mass ${sph_mass_d}
set               type ${g_type} mass ${sph_mass_g}
set               type ${w_type} mass ${sph_mass_w}

set               type ${d_type} meso_rho ${sph_rho_d}
set               type ${g_type} meso_rho ${sph_rho_g}
set               type ${w_type} meso_rho ${sph_rho_w}

# variable          dL   equal 0.1
# variable          tprofile atom ((${Tc}-1)*y/${dL}-((${Tc}-1)*${y1}-${dL})/${dL})*(y-${y1}<${dL})+${Tc}*(y-${y1}>${dL})
# fix               tpr         flow setmeso meso_t v_tprofile

if "${ndim}==2" then "fix e2d all enforce2d"
group              droplet type ${d_type}


compute            rho_peratom all meso_rho/atom
compute            colorgradient_peratom all meso_colorgradient/atom
compute         it_atom all meso_t/atom
compute         ie_atom all meso_e/atom
compute         ie all reduce sum c_ie_atom
variable        vie equal c_ie
variable        volume atom mass/c_rho_peratom
compute         dvol droplet reduce sum v_volume
variable        vvol equal c_dvol
compute         ied droplet reduce sum c_ie_atom
variable        vied equal c_ied
variable        vdroplet equal count(droplet)
variable        vnd equal count(droplet)*${dx}^${ndim}
variable        xvcm equal xcm(droplet,x)
variable        yvcm equal xcm(droplet,y)-${y1}
variable        velcmx equal vcm(droplet,x)
variable        velcmy equal vcm(droplet,y)
variable        vmi equal (bound(droplet,ymin)-${y1})/${dx}
fix extra all print 1 &
"${time} ${vnd} ${vie} ${vied} ${vvol} ${vdroplet} ${xvcm} ${yvcm} ${velcmx} ${velcmy} ${vmi}" &
file ${dname}/rg.dat screen no

dump               dump_id all custom ${Nfreq} ${dname}/dump*.dat id type x y z vx vy vz &
                                                                  c_rho_peratom c_ie_atom mass c_it_atom
dump_modify        dump_id first yes sort id pad 8

thermo_style        custom step v_time v_natoms v_vnd
thermo              10

variable           pcutoff equal ${h}
fix                fdep droplet phase_change &
                   ${Tc} ${Tt} ${Hwv} ${dr} ${sph_mass_d} &
                   ${pcutoff} ${g_type} ${d_type} ${insert_every} 12345 ${prob} region rflow units box

variable bodyfy atom mass*${gy}
fix gravity_f flow addforce v_bodyfy 0.0 0.0
fix gravity_d droplet addforce v_bodyfy 0.0 0.0

#include rem-box.lmp

run               10000000
