log                ${dname}/log.lammps
echo               both
units              si
atom_style         meso
# periodic boundaries to have a correct density on the wall
# TODO: make density fixed for the choosen particles
boundary          p p p

variable          ndim equal 2
dimension         ${ndim}
include           vars.lmp

# create simulation box
variable           xcenter equal 0.5*${Lx}
variable           ycenter equal 0.5*${Ly}
if ${ndim}==3 then &
"variable           zcenter equal 0.5*${Lz}" &
else &
"variable           zcenter equal 0.0" &

if ${ndim}==2 then &
"variable           pLz    equal  1.0e-3" &
"variable           nLz    equal  -1.0e-3" &
"region             box block 0.0 ${Lx}  0.0 ${Ly} ${nLz} ${pLz} units box" &
else &
"region             box block 0.0 ${Lx}  0.0 ${Ly} 0.0 ${Lz} units box"

# create box with two types of particles (water, gas)
create_box         2 box

# create gas particles
if ${ndim}==2 then &
"lattice            sq ${dx}" &
else &
"lattice            sc ${dx}"

create_atoms       ${g_type} region box
compute            rho_peratom all meso_rho/atom
compute            colorgradient_peratom all meso_colorgradient/atom

# compute energy
compute            ie_atom all meso_e/atom
# compute total energy
compute            ie all reduce sum c_ie_atom

fix                integrate_fix_full all meso/stationary

dump               dump_id all custom ${Nfreq} ${dname}/dump*.dat id type x y z vx vy vz &
c_rho_peratom c_colorgradient_peratom c_ie_atom
dump_modify        dump_id first yes sort id pad 8

neighbor           3.0e-2 bin
neigh_modify       delay 0 every 1

communicate        single vel yes
set                group all meso_rho ${sph_rho_g}

pair_style         hybrid/overlay sph/rhosum_multiphase 1 sph/colorgradient 1 sph/heatconduction
pair_coeff         * * sph/rhosum_multiphase   ${h}

variable           cg_cutoff equal 3.0*${dx}
pair_coeff         ${d_type} ${d_type} sph/colorgradient ${cg_cutoff} 0
pair_coeff         ${g_type} ${d_type} sph/colorgradient ${cg_cutoff} ${alpha}
pair_coeff         ${g_type} ${g_type} sph/colorgradient ${cg_cutoff} 0


pair_coeff         * * sph/heatconduction  0.01 ${h}

dump               dump_xyz all xyz ${Nfreq} ${dname}/data.xyz
dump_modify        dump_xyz element A B

variable            time equal step*dt
variable            natoms equal count(all)
thermo_style        custom step v_time v_natoms c_ie
thermo              10

timestep   0.0011410886614690962486
variable          xcenter_per equal ${xcenter}+0.5*${dx}
variable          ycenter_per equal ${ycenter}+0.5*${dx}
create_atoms      ${d_type} single  ${xcenter_per} ${ycenter_per} ${zcenter} units box

set               type ${d_type} mass ${sph_mass_d}
set               type ${g_type} mass ${sph_mass_g}
set               type ${d_type} meso_rho ${sph_rho_d}
set               type ${g_type} meso_rho ${sph_rho_g}
set               type ${d_type} meso_cv ${cv_d}
set               type ${g_type} meso_cv ${cv_g}

region             rinsert block EDGE EDGE EDGE EDGE EDGE EDGE units box
variable           Ninsert equal 1000
variable           insert_every equal 1
variable           prob equal 1.0
variable           Tc equal 0.5
variable           Tt equal 0.5
variable           Hwv equal 100.0
variable           dr equal 0.5*${dx}
group              droplet type ${d_type}
variable          e_g       equal ${cv_g}*1.0
variable          e_d       equal ${cv_d}*${Tc}
set               type ${g_type} meso_e ${e_g}
set               type ${d_type} meso_e ${e_d}

compute cendroplot droplet reduce sum c_ie_atom
variable numberofdroplet equal count(droplet)
variable totalenergy equal c_ie
variable endroplet  equal c_cendroplot
fix extra all print 1 "${time} ${numberofdroplet} ${totalenergy} ${endroplet}" file ${dname}/rg.dat screen no

run               1
fix                fdep droplet phase_change &
                   ${Tc} ${Tt} ${Hwv} ${dr} ${sph_mass_d} &
                   ${h} ${g_type} ${d_type} ${insert_every} 12345 ${prob} region box units box
run               1
