shell              mkdir              ${dname}
log                ${dname}/log.lammps
echo               both
units              si

# requires a custom version of LAMMPS
# https://github.com/slitvinov/lammps-sph-multiphase
# Built with
# make yes-USER-SPH
#
# See also
# http://lammps.sandia.gov/doc/Section_start.html#start_3
atom_style         meso/multiphase
boundary          p p p

#variable          ndim equal 3
dimension         ${ndim}
include           vars.lmp

# create simulation box
variable           xcenter equal 0.5*${Lx}
variable           ycenter equal 0.5*${Ly}
if ${ndim}==3 then &
"variable           zcenter equal 0.5*${Lz}" &
else &
"variable           zcenter equal 0.0" &

if ${ndim}==2 then &
"variable           pLz    equal  1.0e-3" &
"variable           nLz    equal  -1.0e-3" &
"region             box block 0.0 ${Lx}  0.0 ${Ly} ${nLz} ${pLz} units box" &
else &
"region             box block 0.0 ${Lx}  0.0 ${Ly} 0.0 ${Lz} units box"

# create box with two types of particles (water, gas)
create_box         2 box

# create gas particles
if ${ndim}==2 then &
"lattice            sq ${dx}" &
else &
"lattice            sc ${dx}"

create_atoms       ${g_type} region box


set                 type ${d_type} meso_rho ${sph_rho_d}
set                 type ${g_type} meso_rho ${sph_rho_g}

compute            rho_peratom all meso_rho/atom
compute            ie_atom all meso_e/atom

# do full time integration for all particles
fix                integrate_fix_full all meso

dump               dump_id all custom ${Nfreq} ${dname}/dump*.dat &
                                id type  &
                                x y z vx vy vz fx fy fz &
                                c_rho_peratom c_ie_atom

dump_modify        dump_id first yes sort id pad 8

variable           sph_mu  equal ${sph_eta_d}/${sph_rho_d}
include            settimestep.lmp

neighbor           0 bin
neigh_modify       delay 0 every 1

comm_modify        vel yes
set                group all meso_rho ${sph_rho_g}

pair_style         hybrid/overlay sph/rhosum/multiphase 1 sph/surface_stress 1 &
                   sph/taitwater/multiphase sph/surfacetension

pair_coeff         * * sph/rhosum/multiphase   ${h}

variable           cg_cutoff equal 3.0*${dx}
pair_coeff         ${d_type} ${d_type} sph/surface_stress ${cg_cutoff} 0
pair_coeff         ${g_type} ${d_type} sph/surface_stress ${cg_cutoff} ${alpha}
pair_coeff         ${g_type} ${g_type} sph/surface_stress ${cg_cutoff} 0

# harmonic mean of viscosities
variable           sph_eta_gd equal 2*${sph_eta_g}*${sph_eta_d}/(${sph_eta_d}+${sph_eta_g})
pair_coeff         ${g_type} ${d_type} sph/taitwater/multiphase ${sph_rho_g} ${sph_c_g} ${sph_eta_gd} 7.0 ${h} ${rbackground}
pair_coeff         ${g_type} ${g_type} sph/taitwater/multiphase ${sph_rho_g} ${sph_c_g} ${sph_eta_g} 7.0 ${h} ${rbackground}
pair_coeff         ${d_type} ${d_type} sph/taitwater/multiphase ${sph_rho_d} ${sph_c_d} ${sph_eta_d} 7.0 ${h} ${rbackground}

pair_coeff         * * sph/surfacetension ${h}

dump               dump_xyz all xyz ${Nfreq} ${dname}/droplet.xyz
dump_modify        dump_xyz element A B

variable            time equal step*dt
variable            natoms equal count(all)
thermo_style        custom step v_time v_natoms
thermo              ${Nfreq}

timestep           ${dt}

include           cube.lmp
set               type ${d_type} mass ${sph_mass_d}
set               type ${g_type} mass ${sph_mass_g}


group             droplet type ${d_type}
compute           rg droplet gyration
# http://en.wikipedia.org/wiki/Relative_shape_anisotropy

write_data        ${dname}/droplet.dat
variable          time equal step*dt
fix extra all print ${Nfreq} "${time} $(c_rg)" file ${dname}/rg.dat screen no

variable          nstep equal round(0.5/${dt})

run               ${nstep}
